New "monitor.Battery_1" element="Storage.Battery_1" mode=7
New "monitor.Battery_2" element="Storage.Battery_2" mode=7
New "monitor.Battery_3" element="Storage.Battery_3" mode=7
New "monitor.Battery_4" element="Storage.Battery_4" mode=7
New "monitor.Battery_5" element="Storage.Battery_5" mode=7
New "monitor.Battery_6" element="Storage.Battery_6" mode=7
New "monitor.Battery_7" element="Storage.Battery_7" mode=7
New "monitor.Battery_8" element="Storage.Battery_8" mode=7
New "monitor.Battery_9" element="Storage.Battery_9" mode=7
New "monitor.Battery_10" element="Storage.Battery_10" mode=7
New "monitor.Battery_11" element="Storage.Battery_11" mode=7
New "monitor.Battery_12" element="Storage.Battery_12" mode=7
New "monitor.Battery_13" element="Storage.Battery_13" mode=7
New "monitor.Battery_14" element="Storage.Battery_14" mode=7
New "monitor.Battery_15" element="Storage.Battery_15" mode=7
New "monitor.Battery_16" element="Storage.Battery_16" mode=7
New "monitor.Battery_17" element="Storage.Battery_17" mode=7
New "monitor.Battery_18" element="Storage.Battery_18" mode=7
New "monitor.Battery_19" element="Storage.Battery_19" mode=7
New "monitor.Battery_20" element="Storage.Battery_20" mode=7
New "monitor.Battery_21" element="Storage.Battery_21" mode=7
New "monitor.Battery_22" element="Storage.Battery_22" mode=7
New "monitor.Battery_23" element="Storage.Battery_23" mode=7
New "monitor.Battery_24" element="Storage.Battery_24" mode=7
New "monitor.Battery_25" element="Storage.Battery_25" mode=7
New "monitor.Battery_26" element="Storage.Battery_26" mode=7
New "monitor.Battery_27" element="Storage.Battery_27" mode=7
New "monitor.Battery_28" element="Storage.Battery_28" mode=7
New "monitor.Battery_29" element="Storage.Battery_29" mode=7
New "monitor.Battery_30" element="Storage.Battery_30" mode=7
